Wing
# AVL input file

# Mach
0

# iYsym iZsym Zsym
0 0 0
# Sref Cref Bref
12.2625 0.479206 18
# Xref Yref Zref
0 0 0

# ==========================================================
#                         WING
# ==========================================================
SURFACE
MainWing
# Nchord Cspace [ Nspan Sspace ]
8 1.0 14 0
# Wing is symmetrical to y=0
YDUPLICATE
0
INDEX
1
ANGLE
0
# ----------------------------------------------------------
SECTION
# Xle Yle Zle Chord Ainc
1.82 0 0.077 0.95 0
AFILE
AFsection1.dat
CLAF
1
# ----------------------------------------------------------
SECTION
# Xle Yle Zle Chord Ainc
1.83318 2.25 0.11605 0.9 1
AFILE
AFsection2.dat
CLAF
1
# ----------------------------------------------------------
SECTION
# Xle Yle Zle Chord Ainc
1.92515 4.5 0.191458 0.7 1
AFILE
AFsection3.dat
CLAF
1
# ----------------------------------------------------------
SECTION
# Xle Yle Zle Chord Ainc
2.10107 6.75 0.33979 0.5 1
AFILE
AFsection4.dat
CLAF
1
# ----------------------------------------------------------
SECTION
# Xle Yle Zle Chord Ainc
2.36413 9 0.642654 0.3 0
AFILE
AFsection5.dat
CLAF
1
